# LT8642S_1_A Power Design
# Parameters
Vin_nom := 13.2 V
Vout_nom := 5 V
I_out_min := 0 A
Vin_min := 10 V
Vout_max := Vout_nom*1.05 = 5.25 V
I_out_max := 8 A
Vin_max := 15 V
Vout_min := Vout_nom*0.95 = 4.75 V
F_sw := 1.6 MHz
Vp_max := (Vout_max - Vout_nom)*0.25 = 0.0625 V
# FB Resistor Calcs
R_bot := 6.8
R_top_calc := R_bot*(Vout_nom/0.597 - 1 V) = 50.1514 V  # Need to fix units. 50kOhms
# Switching Frequency
# Set Fsw
Rt := (46.5/(F_sw*10^-6) - 1 s) = 28.0625 s
# Fsw OK?
# Datasheet Values
V_sw_top := 0.2 V
V_sw_bot := 0.1 V
t_on_min := 35 ns
F_sw_max_allowable := (Vout_nom + V_sw_bot)/(t_on_min*(Vin_nom - V_sw_top + V_sw_bot)) = 11123228 1/s
F_sw_max_allowable > F_sw = 1
Vin_min_allowable := (Vout_nom + V_sw_bot)/(1 - F_sw*t_on_min) - V_sw_bot + V_sw_top = 5.50254 V
Vin_min_allowable < Vin_min = 1
# Inductor Calculations
L_initial := ((Vout_nom + V_sw_bot)/F_sw)*0.5 = 1.59375e-6 Wb
ΔI_L := Vout_nom/(L_initial*F_sw)*(1 - Vout_nom/Vin_max) = 1.30719
I_load_max_min := 13.5
I_load_max_max := 18
I_L_peak_1 := I_load_max_min + 0.5*ΔI_L = 14.1536
I_L_peak_2 := I_load_max_max + 0.5*ΔI_L = 18.6536
# Input Caps
η := 0.9  # Estimated efficiency
D_max := Vout_nom/(Vin_max*η) = 0.37037
# Extra 1000 is to convert MHz to KHz from Fsw
Cin_min := I_out_max*D_max*(1 - D_max)*1000*1000/(F_sw*Vp_max) = 18.6557 F
# See http://www.ti.com/lit/an/slta055/slta055.pdf equation 1, 9
Cin_bulk := 1.21*I_out_max*I_out_max*L_initial/(Vp_max*Vp_max) = 0.0315955 s^4*A^3/(kg*m^2)
# Adjusting for units: 320uF
# Design note: Vin should be bypassed with at least 3 ceramic caps: Two small 0402 or 0603 <1uF caps on either side and a larger 4.7uF cap (X7R)
N_Cin := [2; 2; 1; 1]
C_in := [□; □; □; □]
C_in_esr := [□; □; □; □]
C_in_esl := [□; □; □; □]
# C_in_total | C_in_esr_total
C_in_esl_total
# Output Caps
N_Cout_cer := [2; 2; 1; 1]
C_out_cer := [□; □; □; □]
C_out_cer_esr := [□; □; □; □]
C_out_cer_esl := [□; □; □; □]
# C_out_cer_total | C_out_cer_esr_total
C_in_cer_esl_total
N_Cout_tan := [2]
C_out_tan := [□]
C_out_tan_esr := [□]
C_out_tan_esl := [□]
# C_out_tan_total | C_out_tan_esr_total
C_in_tan_esl_total
